# 30 Minute Test
T_rise := T_outlet - T_inlet → T_outlet - T_inlet
Weight_water := Gallons_water_used*ρ_outlet → ρ_outlet*Gallons_water_used
Heat_absorbed := (Weight_water*C_p*T_rise) → -(C_p*ρ_outlet*Gallons_water_used*(T_inlet - T_outlet))
Heat_used := (Gas_corr_used*Heating_Value) + Electric_used → Electric_used + Heating_Value*Gas_corr_used
η := Heat_absorbed/Heat_used → -C_p*ρ_outlet*Gallons_water_used*(T_inlet - T_outlet)/(Electric_used + Heating_Value*Gas_corr_used)
# Second Pass: Gas Thermal
T_inlet := 70.60 °F
Gallons_water_used := 26.5 gal
Heating_Value := 1016 BTU/ft^3
T_outlet := 139.54 °F
Gas_corr_used := 18.72 ft^3
m_dot_gas := 37.44 ft^3/hr
C_p := 1.004 BTU/(Δ°F*lbm)
Electric_used := 0 W*hr
ρ_outlet := 8.205 lbm/gal
T_rise := T_outlet - T_inlet = 68.94 Δ°F
Weight_water := Gallons_water_used*ρ_outlet = 217.432 lbm
Heat_absorbed := (Weight_water*C_p*T_rise) = 15049.8 BTU
Heat_used := (Gas_corr_used*Heating_Value) + Electric_used = 19019.5 BTU
η := Heat_absorbed/Heat_used = 0.791279  # Thermal Efficiency
# Gas Thermal Rate Simplification (Trise)
T_rise := 90 °F
ρ_outlet := 8.205 lbm/gal
C_p := 1.004 BTU/(Δ°F*lbm)
Heat_input := m_dot_gas*Heating_Value = 38039 BTU/hr
A := (Heat_input*η) = 30099.5 BTU/hr
B := T_rise*ρ_outlet = 4510.04 Δ°F*lbm/gal
Rate := A/B*1/C_p = 0.110788 gal/min
# Gas Thermal Rate Simplification
Rate_1 := m_dot_gas*Gallons_water_used/Gas_corr_used = 0.883333 gal/min
# Gas Thermal Rate Simplification
m_dot_gas := 37.44 ft^3/hr
Gallons_water_used := 26.5 gal
Gas_corr_used := 18.72 ft^3
Rate_1 := m_dot_gas*Gallons_water_used/Gas_corr_used = 0.883333 gal/min
